# OpenSim document version 40000
Model STVgoDigital_Body:
  gravity: 0 -9.80665 0
  length_units: meters
  force_units: N
  credits:
    Model constructed by Paula Dias, Luís Matos and Arthur Matta.
  Ground
  BodySet:
    Body thorax: mass=20 [kg] mass_center=(-0.0591 -0.1486 0) inertia=(1.29841 0.55245 1.29841 0 0 0)
        meshes=(thorax.vtp groundspine.vtp)
      PhysicalOffsetFrame thorax_imu: socket_parent=.. translation=(-0.12 -0.04 0) [meters]
          orientation=(1.60159 1.4 -3.14159) [radians]
      PhysicalOffsetFrame sacral_imu: socket_parent=.. translation=(-0.09 -0.25 0) orientation=(-1.6 1.3 -3.14)
      PhysicalOffsetFrame thorax_frame_head: socket_parent=.. translation=(0.0035 -0.39 0) meshes=hat_skull.vtp
      PhysicalOffsetFrame thorax_frame_chin: socket_parent=.. translation=(0.0035 -0.38 0) meshes=hat_jaw.vtp
      WrapEllipsoid ScapulothoracicEllipsoid_r: translation=(-0.02 -0.0173 0.0609) quadrant=all
          dimensions=(0.07 0.15 0.07)
      WrapEllipsoid ScapulothoracicEllipsoid_l: translation=(-0.02 -0.0173 -0.0609) quadrant=all
          dimensions=(0.07 0.15 0.07)
    Body clavicle_r: mass=0.156 mass_center=(-0.02172 0.01007 0.06704)
        inertia=(6.4e-6 2.63e-5 2.43e-5 -6.7e-6 -9.5e-6 2.9e-6) meshes=clavicle_rv.vtp
      PhysicalOffsetFrame clavicle_r_imu: socket_parent=.. translation=(0 0.012 0.12) orientation=(1.8 0 -1.75)
    Body clavicle_l: mass=0.156 mass_center=(-0.02172 0.01007 -0.06704)
        inertia=(6.4e-6 2.63e-5 2.43e-5 -6.7e-6 -9.5e-6 2.9e-6) meshes=clavicle_lv.vtp
      PhysicalOffsetFrame clavicle_l_imu: socket_parent=.. translation=(0 0.012 -0.12) orientation=(1.35 0 1.75)
    Body scapula_r: mass=0.7054 mass_center=(-0.04612 -0.0319 -0.04565) inertia=(0.001 0.001 0.001 0 0 0)
        meshes=scapula_rv.vtp
    Body scapula_l: mass=0.7054 mass_center=(-0.04612 -0.0319 0.04565) inertia=(0.001 0.001 0.001 0 0 0)
        meshes=scapula_lv.vtp
    Body humerus_r: mass=2.0519 mass_center=(0.00537 -0.11493 -0.00261) inertia=(0.0132 0.001988 0.0132 0 0 0)
        meshes=humerus_rv.vtp
      PhysicalOffsetFrame humerus_r_imu: socket_parent=.. translation=(0.002 -0.15 0.005) orientation=(-3.14 0.4 -1.54)
    Body humerus_l: mass=2.0519 mass_center=(0.00537 -0.11493 0.00261) inertia=(0.0132 0.001988 0.0132 0 0 0)
        meshes=humerus_lv.vtp
      PhysicalOffsetFrame humerus_l_imu: socket_parent=.. translation=(0.002 -0.15 -0.005) orientation=(0 0.4 1.54)
    Body ulna_r: mass=0.5464 mass_center=(-0.00927581 -0.105108 0.0261565)
        inertia=(0.0030585 0.00045325 0.0030585 0 0 0) meshes=ulna_rv.vtp
    Body ulna_l: mass=0.5464 mass_center=(-0.00927581 -0.105108 -0.0261565)
        inertia=(0.0030585 0.00045325 0.0030585 0 0 0) meshes=ulna_lv.vtp
    Body radius_r: mass=0.5464 mass_center=(0.0154894 -0.104396 0.0138558)
        inertia=(0.0030585 0.00045325 0.0030585 0 0 0) meshes=radius_rv.vtp
    Body radius_l: mass=0.5464 mass_center=(0.0154894 -0.104396 -0.0138558)
        inertia=(0.0030585 0.00045325 0.0030585 0 0 0) meshes=radius_lv.vtp
    Body hand_r: mass=0.4575 mass_center=(0 -0.068095 0) inertia=(0.000892 0.000547 0.00134 0 0 0)
        meshes=(pisiform_rvs.vtp lunate_rvs.vtp scaphoid_rvs.vtp triquetrum_rvs.vtp hamate_rvs.vtp capitate_rvs.vtp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)
    Body hand_l: mass=0.4575 mass_center=(0 -0.068095 0) inertia=(0.000892 0.000547 0.00134 0 0 0)
        meshes=(pisiform_lvs.vtp lunate_lvs.vtp scaphoid_lvs.vtp triquetrum_lvs.vtp hamate_lvs.vtp capitate_lvs.vtp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)
  JointSet:
    CustomJoint ground_thorax: socket_parent_frame=ground_offset socket_child_frame=thorax_offset
      Coordinate ground_thorax_rot_x: default_value=-2.942694e-19 range=(-1.570796 1.570796) clamped=true
      Coordinate ground_thorax_rot_y: default_value=-1.188958e-18 range=(-6.283185 6.283185) clamped=true
      Coordinate ground_thorax_rot_z: default_value=-4.926189e-12 range=(-1.570796 1.570796) clamped=true
      Coordinate ground_thorax_tx: default_value=2.791426e-26 range=(-1 1) clamped=false locked=true
      Coordinate ground_thorax_ty: default_value=4.876098e-26 range=(-1 1) clamped=false locked=true
      Coordinate ground_thorax_tz: default_value=3.765094e-42 range=(-1 1) clamped=false locked=true
      PhysicalOffsetFrame ground_offset: socket_parent=/ground translation=(0 0 0)
      PhysicalOffsetFrame thorax_offset: socket_parent=/bodyset/thorax translation=(0 0 0)
      SpatialTransform:
        TransformAxis rotation1: coordinates=ground_thorax_rot_x axis=(1 0 0) LinearFunction(coefficients=1 0)
        TransformAxis rotation2: coordinates=ground_thorax_rot_y axis=(0 1 0) LinearFunction(coefficients=1 0)
        TransformAxis rotation3: coordinates=ground_thorax_rot_z axis=(0 0 1) LinearFunction(coefficients=1 0)
        TransformAxis translation1: coordinates=ground_thorax_tx axis=(1 0 0) LinearFunction(coefficients=1 0)
        TransformAxis translation2: coordinates=ground_thorax_ty axis=(0 1 0) LinearFunction(coefficients=1 0)
        TransformAxis translation3: coordinates=ground_thorax_tz axis=(0 0 1) LinearFunction(coefficients=1 0)
    CustomJoint sternoclavicular_r: socket_parent_frame=thorax_offset socket_child_frame=clavicle_r_offset
      Coordinate clav_prot_r: default_value=1.155309e-5 range=(-0.7853982 0.7853982) clamped=true
      Coordinate clav_elev_r: default_value=0.002232384 range=(-0.7853982 0.7853982) clamped=true
      PhysicalOffsetFrame thorax_offset: socket_parent=/bodyset/thorax translation=(0.006325 0.00693 0.025465)
      PhysicalOffsetFrame clavicle_r_offset: socket_parent=/bodyset/clavicle_r translation=(0 0 0)
      SpatialTransform: axes_held_at_zero=(rotation3 translation1 translation2 translation3)
        TransformAxis rotation1: coordinates=clav_prot_r axis=(0.0153 0.9892987 -0.1451)
            LinearFunction(coefficients=1 0)
        TransformAxis rotation2: coordinates=clav_elev_r axis=(-0.9944725 0 -0.104997) LinearFunction(coefficients=1 0)
    CustomJoint sternoclavicular_l: socket_parent_frame=thorax_offset socket_child_frame=clavicle_l_offset
      Coordinate clav_prot_l: default_value=1.459158e-5 range=(-0.7853982 0.7853982) clamped=true
      Coordinate clav_elev_l: default_value=-0.03671552 range=(-0.7853982 0.7853982) clamped=true
      PhysicalOffsetFrame thorax_offset: socket_parent=/bodyset/thorax translation=(0.006325 0.00693 -0.025465)
      PhysicalOffsetFrame clavicle_l_offset: socket_parent=/bodyset/clavicle_l translation=(0 0 0)
      SpatialTransform: axes_held_at_zero=(rotation3 translation1 translation2 translation3)
        TransformAxis rotation1: coordinates=clav_prot_l axis=(-0.0153 -0.9892987 -0.1451)
            LinearFunction(coefficients=1 0)
        TransformAxis rotation2: coordinates=clav_elev_l axis=(0.9944725 0 -0.104997) LinearFunction(coefficients=1 0)
    ScapulothoracicJoint scapulothoracic_r: socket_parent_frame=thorax_offset socket_child_frame=scapula_r_offset
        thoracic_ellipsoid_radii_x_y_z=(0.07 0.15 0.07) scapula_winging_axis_origin=(0 0)
        scapula_winging_axis_direction=0 [radians]
      Coordinate scapula_abduction_r: default_value=0.004331894 range=(-0.7853982 0.7853982) clamped=false
      Coordinate scapula_elevation_r: default_value=0.008612185 range=(-0.7853982 0.7853982) clamped=true
      Coordinate scapula_upward_rot_r: default_value=0.1838983 range=(-0.7853982 0.7853982) clamped=true
      Coordinate scapula_winging_r: default_value=-0.01207238 range=(-0.7853982 0.7853982) clamped=true
      PhysicalOffsetFrame thorax_offset: socket_parent=/bodyset/thorax translation=(-0.02 -0.0173 0.07)
          orientation=(0 -0.87 0)
      PhysicalOffsetFrame scapula_r_offset: socket_parent=/bodyset/scapula_r translation=(-0.05982 -0.03904 -0.056)
          orientation=(-0.5181 -1.1416 -0.2854)
    ScapulothoracicJoint scapulothoracic_l: socket_parent_frame=thorax_offset socket_child_frame=scapula_l_offset
        thoracic_ellipsoid_radii_x_y_z=(-0.07 -0.15 -0.07) scapula_winging_axis_origin=(0 0)
        scapula_winging_axis_direction=0
      Coordinate scapula_abduction_l: default_value=0.0207067 range=(-0.7853982 0.7853982) clamped=true
      Coordinate scapula_elevation_l: default_value=0.00470623 range=(-0.7853982 0.7853982) clamped=true
      Coordinate scapula_upward_rot_l: default_value=0.1313643 range=(-0.7853982 0.7853982) clamped=true
      Coordinate scapula_winging_l: default_value=-0.01159315 range=(-0.7853982 0.7853982) clamped=false
      PhysicalOffsetFrame thorax_offset: socket_parent=/bodyset/thorax translation=(-0.02 -0.0173 -0.07)
          orientation=(0 0.87 0)
      PhysicalOffsetFrame scapula_l_offset: socket_parent=/bodyset/scapula_l translation=(-0.05982 -0.03904 0.056)
          orientation=(0.5181 1.1416 -0.2854)
    CustomJoint glenohumeral_r: socket_parent_frame=scapula_r_offset socket_child_frame=humerus_r_offset
      Coordinate shoulder_abduction_r: default_value=4.724192e-26 range=(-3.141593 3.141593) clamped=true
      Coordinate shoulder_flexion_r: default_value=2.893725e-10 range=(-1.570796 3.141593) clamped=true
      Coordinate shoulder_rotation_r: default_value=7.157212e-5 range=(0 1.54) clamped=true
      PhysicalOffsetFrame scapula_r_offset: socket_parent=/bodyset/scapula_r translation=(-0.00955 -0.034 0.009)
      PhysicalOffsetFrame humerus_r_offset: socket_parent=/bodyset/humerus_r translation=(0 0 0) orientation=(0.15 0 0)
      SpatialTransform: axes_held_at_zero=(translation1 translation2 translation3)
        TransformAxis rotation1: coordinates=shoulder_abduction_r axis=(-0.993 -0.0793 0.0879)
            LinearFunction(coefficients=1 0)
        TransformAxis rotation2: coordinates=shoulder_flexion_r axis=(-0.185 0.0654 0.9944)
            LinearFunction(coefficients=1 0)
        TransformAxis rotation3: coordinates=shoulder_rotation_r axis=(-0.0846 0.9947 -0.0584)
            LinearFunction(coefficients=1 0)
    CustomJoint glenohumeral_l: socket_parent_frame=scapula_l_offset socket_child_frame=humerus_l_offset
      Coordinate shoulder_abduction_l: default_value=1.960039e-17 range=(-3.141593 3.141593) clamped=true
      Coordinate shoulder_flexion_l: default_value=2.31498e-10 range=(-1.570796 3.141593) clamped=true
      Coordinate shoulder_rotation_l: default_value=7.773746e-5 range=(0 1.54) clamped=true
      PhysicalOffsetFrame scapula_l_offset: socket_parent=/bodyset/scapula_l translation=(-0.00955 -0.034 -0.009)
      PhysicalOffsetFrame humerus_l_offset: socket_parent=/bodyset/humerus_l translation=(0 0 0)
          orientation=(-0.15 0 0)
      SpatialTransform: axes_held_at_zero=(translation1 translation2 translation3)
        TransformAxis rotation1: coordinates=shoulder_abduction_l axis=(0.993 0.0793 0.0879)
            LinearFunction(coefficients=1 0)
        TransformAxis rotation2: coordinates=shoulder_flexion_l axis=(0.185 -0.0654 0.9944)
            LinearFunction(coefficients=1 0)
        TransformAxis rotation3: coordinates=shoulder_rotation_l axis=(0.0846 -0.9947 -0.0584)
            LinearFunction(coefficients=1 0)
    CustomJoint elbow_r: socket_parent_frame=humerus_r_offset socket_child_frame=ulna_r_offset
      Coordinate elbow_flexion_r: default_value=0 range=(0 3.141593) clamped=false locked=true
      PhysicalOffsetFrame humerus_r_offset: socket_parent=/bodyset/humerus_r translation=(0.0061 -0.2904 -0.0123)
      PhysicalOffsetFrame ulna_r_offset: socket_parent=/bodyset/ulna_r translation=(0 0 0)
      SpatialTransform: axes_held_at_zero=(rotation1 rotation2 translation1 translation2 translation3)
        TransformAxis rotation3: coordinates=elbow_flexion_r axis=(0.04940001 0.03660001 0.9981083)
            LinearFunction(coefficients=1 0)
    CustomJoint elbow_l: socket_parent_frame=humerus_l_offset socket_child_frame=ulna_l_offset
      Coordinate elbow_flexion_l: default_value=0 range=(0 3.141593) clamped=false locked=true
      PhysicalOffsetFrame humerus_l_offset: socket_parent=/bodyset/humerus_l translation=(0.0061 -0.2904 0.0123)
      PhysicalOffsetFrame ulna_l_offset: socket_parent=/bodyset/ulna_l translation=(0 0 0)
      SpatialTransform: axes_held_at_zero=(rotation1 rotation2 translation1 translation2 translation3)
        TransformAxis rotation3: coordinates=elbow_flexion_l axis=(-0.04940001 -0.03660001 0.9981083)
            LinearFunction(coefficients=1 0)
    CustomJoint radioulnar_r: socket_parent_frame=ulna_r_offset socket_child_frame=radius_r_offset
      Coordinate pro_sup_r: default_value=0 range=(-1.570796 1.570796) clamped=false locked=true
      PhysicalOffsetFrame ulna_r_offset: socket_parent=/bodyset/ulna_r translation=(0.0004 -0.011503 0.019999)
      PhysicalOffsetFrame radius_r_offset: socket_parent=/bodyset/radius_r translation=(0 0 0)
      SpatialTransform: axes_held_at_zero=(rotation1 rotation3 translation1 translation2 translation3)
        TransformAxis rotation2: coordinates=pro_sup_r axis=(-0.01716099 0.9926656 -0.119668)
            LinearFunction(coefficients=1 0)
    CustomJoint radioulnar_l: socket_parent_frame=ulna_l_offset socket_child_frame=radius_l_offset
      Coordinate pro_sup_l: default_value=0 range=(-1.570796 1.570796) clamped=false locked=true
      PhysicalOffsetFrame ulna_l_offset: socket_parent=/bodyset/ulna_l translation=(0.0004 -0.011503 -0.019999)
      PhysicalOffsetFrame radius_l_offset: socket_parent=/bodyset/radius_l translation=(0 0 0)
      SpatialTransform: axes_held_at_zero=(rotation1 rotation3 translation1 translation2 translation3)
        TransformAxis rotation2: coordinates=pro_sup_l axis=(0.01716099 -0.9926656 -0.119668)
            LinearFunction(coefficients=1 0)
    CustomJoint radius_hand_r: socket_parent_frame=radius_r_offset socket_child_frame=hand_r_offset
      Coordinate wrist_flex_r: default_value=0 range=(-1.22173 1.22173) clamped=true locked=true
      Coordinate wrist_dev_r: default_value=0 range=(-0.4363323 0.6108652) clamped=true locked=true
      PhysicalOffsetFrame radius_r_offset: socket_parent=/bodyset/radius_r translation=(-0.008797 -0.235841 0.01361)
      PhysicalOffsetFrame hand_r_offset: socket_parent=/bodyset/hand_r translation=(0 0 0)
      SpatialTransform: axes_held_at_zero=(rotation3 translation1 translation2 translation3)
        TransformAxis rotation1: coordinates=wrist_flex_r axis=(0 0 1) LinearFunction(coefficients=1 0)
        TransformAxis rotation2: coordinates=wrist_dev_r axis=(1 0 0) LinearFunction(coefficients=1 0)
    CustomJoint radius_hand_l: socket_parent_frame=radius_l_offset socket_child_frame=hand_l_offset
      Coordinate wrist_flex_l: default_value=0 range=(-1.22173 1.22173) clamped=true locked=true
      Coordinate wrist_dev_l: default_value=0 range=(-0.4363323 0.6108652) clamped=true locked=true
      PhysicalOffsetFrame radius_l_offset: socket_parent=/bodyset/radius_l translation=(-0.008797 -0.235841 -0.01361)
      PhysicalOffsetFrame hand_l_offset: socket_parent=/bodyset/hand_l translation=(0 0 0)
      SpatialTransform: axes_held_at_zero=(rotation3 translation1 translation2 translation3)
        TransformAxis rotation1: coordinates=wrist_flex_l axis=(0 0 1) LinearFunction(coefficients=1 0)
        TransformAxis rotation2: coordinates=wrist_dev_l axis=(-1 0 0) LinearFunction(coefficients=1 0)
  ConstraintSet:
    PointConstraint AC_r: socket_body_1=/bodyset/clavicle_r socket_body_2=/bodyset/scapula_r
        location_body_1=(-0.02924 0.02024 0.12005) location_body_2=(-0.01357 0.00011 -0.01523)
    PointConstraint AC_l: socket_body_1=/bodyset/clavicle_l socket_body_2=/bodyset/scapula_l
        location_body_1=(-0.02924 0.02024 -0.12005) location_body_2=(-0.01357 0.00011 0.01523)
  ForceSet:
    CoordinateLimitForce [values shared by the 10 below unless stated]: upper_stiffness=20 [N*m/degree]
        lower_stiffness=20 [N*m/degree] damping=1 transition=10 [degrees]
    CoordinateLimitForce ClavicleElevationLimits_r: coordinate=clav_elev_r upper_limit=25 [degrees]
        lower_limit=-20 [degrees]
    CoordinateLimitForce ClavicleElevationLimits_l: coordinate=clav_elev_l upper_limit=25 lower_limit=-20
    CoordinateLimitForce ClavicleProtractionLimits_r: coordinate=clav_prot_r upper_limit=25 lower_limit=-10
    CoordinateLimitForce ClavicleProtractionLimits_l: coordinate=clav_prot_l upper_limit=25 lower_limit=-10
    CoordinateLimitForce ScapulaRotationLimits_r: coordinate=scapula_upward_rot_r upper_limit=50 lower_limit=-20
    CoordinateLimitForce ScapulaRotationLimits_l: coordinate=scapula_upward_rot_l upper_limit=50 lower_limit=-20
    CoordinateLimitForce ShoulderRotationLimits_r: coordinate=shoulder_abduction_r upper_limit=180 lower_limit=-85
    CoordinateLimitForce ShoulderRotationLimits_l: coordinate=shoulder_abduction_l upper_limit=180 lower_limit=-85
    CoordinateLimitForce ElbowFlexLimit_r: coordinate=elbow_flexion_r upper_limit=140 lower_limit=0
    CoordinateLimitForce ElbowFlexLimit_l: coordinate=elbow_flexion_l upper_limit=140 lower_limit=0
  MarkerSet:
    Marker ij: thorax (0 0 0)
    Marker c7: thorax (-0.0899063 0.0327569 0)
    Marker t8: thorax (-0.111155 -0.154433 0)
    Marker px: thorax (0.0697635 -0.164311 0)
    Marker ClavicleMassCenter_r: clavicle_r (-0.02172 0.01007 0.06704)
    Marker ClavicleMassCenter_l: clavicle_l (-0.02172 0.01007 -0.06704)
    Marker acc_r: clavicle_r (-0.028301 0.018552 0.117034)
    Marker acc_l: clavicle_l (-0.028301 0.018552 -0.117034)
    Marker sc_r: clavicle_r (0 0 0)
    Marker sc_l: clavicle_l (0 0 0)
    Marker ScapulaMassCenter_r: scapula_r (-0.04612 -0.0319 -0.04565)
    Marker ScapulaMassCenter_l: scapula_l (-0.04612 -0.0319 0.04565)
    Marker ScapulaThoracicContactPt_r: scapula_r (-0.05982 -0.03904 -0.056)
    Marker ScapulaThoracicContactPt_l: scapula_l (-0.05982 -0.03904 0.056)
    Marker ac_r: scapula_r (-0.0119247 -0.00196687 -0.0176399)
    Marker ac_l: scapula_l (-0.0119247 -0.00196687 0.0176399)
    Marker ai_r: scapula_r (-0.115393 -0.116437 -0.0826482)
    Marker ai_l: scapula_l (-0.115393 -0.116437 0.0826482)
    Marker ts_r: scapula_r (-0.0921861 -0.00870938 -0.095417)
    Marker ts_l: scapula_l (-0.0921861 -0.00870938 0.095417)
    Marker aa_r: scapula_r (-0.044807 -4.28397e-5 0.00490913)
    Marker aa_l: scapula_l (-0.044807 -4.28397e-5 -0.00490913)
    Marker HumerusMassCenter_r: humerus_r (0.00537 -0.11493 -0.00261)
    Marker HumerusMassCenter_l: humerus_l (0.00537 -0.11493 0.00261)
    Marker gu_r: humerus_r (0 0 0)
    Marker gu_l: humerus_l (0 0 0)
    Marker EpL_r: humerus_r (0.00134695 -0.285625 0.022249)
    Marker EpL_l: humerus_l (0.00134695 -0.285625 -0.022249)
    Marker EpM_r: humerus_r (0.00148415 -0.282015 -0.0446513)
    Marker EpM_l: humerus_l (0.00148415 -0.282015 0.0446513)
    Marker centelbow_r: humerus_r (0.0009 -0.2842 -0.0097)
    Marker centelbow_l: humerus_l (0.0009 -0.2842 0.0097)
    Marker centijc7: thorax (-0.0415 0.0163 0)
    Marker centpxt8: thorax (-0.0207 -0.1601 0.0004)
  ComponentSet:
    IMU thorax_imu: socket_frame=/bodyset/thorax/thorax_imu
    IMU humerus_r_imu: socket_frame=/bodyset/humerus_r/humerus_r_imu
    IMU humerus_l_imu: socket_frame=/bodyset/humerus_l/humerus_l_imu
    IMU clavicle_r_imu: socket_frame=/bodyset/clavicle_r/clavicle_r_imu
    IMU clavicle_l_imu: socket_frame=/bodyset/clavicle_l/clavicle_l_imu
    IMU sacral_imu: socket_frame=/bodyset/thorax/sacral_imu
